// COMSOL Multiphysics 5.5.0.359 model "diff_membrana.mph"
// Outline of the model tree

Geometry
  geom1 "Geometry 1" (1D, length unit m)
    i1: Interval | coord = 0, 1
    fin: Finalize "Form Union"

Physics
  tds: DilutedSpecies "Transport of Diluted Species" on all domains
    dependent variable c
    cdm1: ConvectionDiffusionMigration "Transport Properties 1" (default) | D_c = 0.01
    nflx1: NoFlux (default)
    init1: init "Initial Values 1" (default)
    conc1: Concentration on boundaries 1 | species = 1; c0 = 3
    conc2: Concentration on boundaries 2 | species = 1; c0 = 5

Mesh
  mesh1 "Mesh 1" (physics-controlled)
    size: MeshSizeDefault | hauto = 1

Studies
  std1 "Study 1"
    time: Transient "Time Dependent"
      tlist = {0, 1, 2, 3, 4, 5, 6, 7, 8, 9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}

Solver configurations
  sol1 "Solution 1" (study std1)
    v1: Variables "Dependent Variables 1"
    t1: Time "Time-Dependent Solver 1"
      tlist = 0, 1, 2, 3, 4, 5, 6, 7, 8, 9,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
      rtol = 0.005
      maxorder = 2
      fc1: FullyCoupled
        linsolver = d1
        maxiter = 8
        damp = 0.9
        jtech = once
        stabacc = aacc
        aaccdim = 5
        aaccmix = 0.9
        aaccdelay = 1
      d1: Direct | linsolver = pardiso; pivotperturb = 1.0E-13

Datasets
  dset1: Solution | solution = sol1