// COMSOL Multiphysics 5.5.0.359 model "cilindro_con_sfera_2.mph"
// Outline of the model tree

Geometry
  geom1 "Geometry 1" (3D, length unit m)
    sph1: Sphere | pos = {0, 0.015, 0.01}; r = 0.003
    sph2: Sphere | pos = {0, -0.015, 0.01}; r = 0.003
    sph3: Sphere | pos = {0, 0.0075, 0.01}; r = 0.003
    sph4: Sphere | pos = {0, -0.0075, 0.01}; r = 0.003
    cyl1: Cylinder | r = 0.03; h = 0.02
    fin: Finalize "Form Union"

Physics
  tds: DilutedSpecies "Transport of Diluted Species" on all domains
    dependent variable c
    cdm1: ConvectionDiffusionMigration "Transport Properties (sferette)" (default) | D_c = 2.0E-6
    nflx1: NoFlux (default)
    init1: init "Initial Values 1 (cilindro)" (default) | initc = 0
    init2: init "Initial Values 1 (sferette)" on domains 2-5 | initc = 3
    cdm2: ConvectionDiffusionMigration "Transport Properties 1 (cilindro)" on domains 1 | D_c = 1.0E-6

Mesh
  mesh1 "Mesh 1" (physics-controlled)

Studies
  std1 "Study 1"
    time: Transient "Time Dependent" | tlist = range(0,0.1,1)