// COMSOL Multiphysics 5.5.0.359 model "cilindro_con_sfera_4.mph"
// Outline of the model tree

Geometry
  geom1 "Geometry 1" (3D, length unit m)
    sph1: Sphere | pos = {0, 0.015, 0.01}; r = 0.003
    sph2: Sphere | pos = {0, -0.015, 0.01}; r = 0.003
    sph3: Sphere | pos = {0, 0.0075, 0.01}; r = 0.003
    sph4: Sphere | pos = {0, -0.0075, 0.01}; r = 0.003
    cyl1: Cylinder | r = 0.03; h = 0.02
    fin: Finalize "Form Union"

Physics
  tds: DilutedSpecies "Transport of Diluted Species" on all domains
    dependent variable c
    cdm1: ConvectionDiffusionMigration "Transport Properties (sferette)" (default) | D_c = 2.0E-6
    nflx1: NoFlux (default)
    init1: init "Initial Values 1 (cilindro)" (default)
    init2: init "Initial Values 1 (sferette)" on domains 2-5 | initc = 3
    cdm2: ConvectionDiffusionMigration "Transport Properties 1 (cilindro)" on domains 1 | D_c = 1.0E-6

Mesh
  mesh1 "Mesh 1" (physics-controlled)
    size: MeshSizeDefault | hauto = 9

Studies
  std1 "Study 1"
    time: Transient "Time Dependent"
      tlist = {0, 0.2, 0.4, 0.6, 0.8, 1, 1.2, 1.4, 1.6, 1.8, 2, 2.2, 2.4, 2.6, 2.8, 3, 3.2, 3.4, 3.6, 3.8, 4}

Solver configurations
  sol1 "Solution 1" (study std1)
    v1: Variables "Dependent Variables 1"
    t1: Time "Time-Dependent Solver 1"
      tlist = {0, 0.2, 0.4, 0.6, 0.8, 1, 1.2, 1.4, 1.6, 1.8, 2, 2.2, 2.4, 2.6, 2.8, 3, 3.2, 3.4, 3.6, 3.8, 4}
      rtol = 0.005
      maxorder = 2
      fc1: FullyCoupled | maxiter = 8; damp = 0.9; jtech = once; stabacc = aacc; aaccdim = 5; aaccmix = 0.9; aaccdelay = 1
      i1: Iterative | maxlinit = 400; rhob = 40
        mg1: Multigrid

Datasets
  dset1: Solution | solution = sol1
  cln1: CutLine3D | data = dset1; genpoints = {{0, 0.015, 0.01}, {1, .015, 0.04}}

Derived values
  int1: IntVolume "Volume Integration 1" on domains 1
    data = dset1
    table = tbl1
    expr = c
    unit = mol
    descr = Concentration

Tables
  tbl1: Table
    // Volume Integration 1
    Time (s) | Concentration (mol)
    0 | 1.46932e-06
    0.2 | 1.48188e-06
    0.4 | 1.48704e-06
    0.6 | 1.49097e-06
    0.8 | 1.49408e-06
    1 | 1.4966e-06
    1.2 | 1.49872e-06
    1.4 | 1.50052e-06
    1.6 | 1.50209e-06
    1.8 | 1.5035e-06
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
Plots
  pg1: PlotGroup3D "Concentration, Streamline (tds)" | data = dset1
    str1: Streamline
      expr = {tds.tflux_cx, tds.tflux_cy, tds.tflux_cz}
      pointtype = arrow
      arrowcount = 35
      arrowlength = logarithmic
      arrowscale = 607.7557414184245
      col: Color "Color Expression" | expr = c; descr = Concentration
  pg2: PlotGroup3D "Concentration, Surface (tds)" | data = dset1; typeintitle = off
    surf1: Surface | expr = c; descr = Concentration
  pg3: PlotGroup1D "1D Plot Group 3" | data = none
    tblp1: Table "Table Graph 1" | table = tbl1
  pg4: PlotGroup1D "1D Plot Group 4" | data = dset1
    lngr1: LineGraph | data = cln1; expr = c